// SBML level 3 version 1

model self_regulating_gene()
  // model units - substance: item, time: second, volume: litre, extent: item

  // Compartments:
  compartment V = 1e-15;

  // Species:
  substanceOnly species RNAP in V = 1;
  substanceOnly species RNAP_stall in V = 1;
  substanceOnly species RNAP_p1 in V = 1;
  substanceOnly species step in V = 1;
  substanceOnly species Ncoil_m1 in V = 1;
  substanceOnly species Pcoil_m1 in V = 1;
  substanceOnly species Ncoil_p1 in V = 1;
  substanceOnly species Pcoil_p1 in V = 1;

  // Reactions:
  elongation: RNAP => RNAP + step; 1*RNAP;
  translocation: 60 RNAP + step => RNAP_p1; 10000000000*RNAP*step^60;
  stall: RNAP + Ncoil_m1 + Pcoil_m1 + Ncoil_p1 + Pcoil_p1 => RNAP_stall + Ncoil_m1 + Pcoil_m1 + Ncoil_p1 + Pcoil_p1; ;
    stall_sigmaConversion = 0.01; stall_torqueDomainBoundary0 = 0.008; stall_torqueDomainBoundary1 = 0.02; stall_torqueValue0 = 445.56; stall_torqueValue1 = 3.56; stall_torqueValue2 = 173.6; stall_stallCutoff = 18.5;
  resume: RNAP_stall + Ncoil_m1 + Pcoil_m1 + Ncoil_p1 + Pcoil_p1 => RNAP + Ncoil_m1 + Pcoil_m1 + Ncoil_p1 + Pcoil_p1; ;
    resume_sigmaConversion = 0.01; resume_torqueDomainBoundary0 = 0.008; resume_torqueDomainBoundary1 = 0.02; resume_torqueValue0 = 445.56; resume_torqueValue1 = 3.56; resume_torqueValue2 = 173.6; resume_stallCutoff = 18.5;

  // Unit definitions:
  unit per_second = 1 / second;
end
